Data := READPRN("roll.log")
Size := rows(Data)
i := 0 .. Size - 1
Roll := Data[:, 0]
weight := 500000*9.8
TX := Data[:, 1]
TYl := Data[:, 2]
mch := -(TX[10] - TX[0])/(Roll[10] - Roll[0])*1/weight = 0.0139706
TZ := Data[:, 3]
i := 0 .. 180
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